# OpenSim document version 30000
MarkerSet:
  Marker LASI: pelvis (0.0080898 0.0101666 -0.124647)
  Marker RASI: pelvis (-0.00597153 0.00359413 0.127307)
  Marker LPSI: pelvis (-0.183608 0.0634621 -0.0680169)
  Marker RPSI: pelvis (-0.180909 0.0634337 0.0546326)
  Marker LTHI: femur_l (-0.00399242 -0.20754 -0.0999247)
  Marker LKNE: femur_l (0 -0.415174 -0.0525)
  Marker RTHI: femur_r (-1.38556e-16 -0.224945 0.0909677)
  Marker RTHIAP: femur_r (0.0856812 -0.129162 0.00798214)
  Marker RTHIAD: femur_r (0.0676393 -0.273726 0.00140983)
  Marker RKNE: femur_r (3.72529e-9 -0.402651 0.0527368)
  Marker LTIB: tibia_l (2.39808e-16 -0.1859 -0.0715228)
  Marker LANK: tibia_l (0 -0.424826 -0.04)
  Marker RTIB: tibia_r (-1.77636e-17 -0.206151 0.0710892)
  Marker RANK: tibia_r (-0.00969172 -0.418783 0.0429379)
  Marker RSHN: tibia_r (0.0430657 -0.30215 0.00585706)
  Marker RTIAP: tibia_r (0.061507 -0.130748 0.00609033)
  Marker RHEE: calcn_r (-0.0645362 -0.0271254 -0.0145158)
  Marker RCUN: calcn_r (0.0817053 0.00652635 0.00423662)
  Marker RD1M: toes_r (0.00465547 0.00432085 -0.0457093)
  Marker RD5M: toes_r (-0.006375 -0.00323313 0.0657584)
  Marker LTHIAP: femur_l (0.0572164 -0.144032 -0.0357071)
  Marker LTHIAD: femur_l (0.0727469 -0.264569 -0.0188624)
  Marker LTIAP: tibia_l (0.061507 -0.130748 0.00609033)
  Marker LSHN: tibia_l (0.0430657 -0.30215 0.00585706)
  Marker LHEE: calcn_l (-0.0645362 -0.0271254 -0.0145158)
  Marker LCUN: calcn_l (0.0817053 0.00652635 0.00423662)
  Marker LD1M: toes_l (-0.00492577 0.00216376 0.0470056)
  Marker LD5M: toes_l (-0.016706 0.00973708 -0.0569778)
