# OpenSim document version 30000
InverseKinematicsTool:
  results_directory: ./
  constraint_weight: Inf
  accuracy: 1e-8
  report_errors: true
  report_marker_locations: true
  IKTaskSet:
    IKMarkerTask LASI: apply=true weight=100
    IKMarkerTask LASI_posAnt: apply=true weight=100
    IKMarkerTask LASI_medLat: apply=true weight=100
    IKMarkerTask LASI_supInf: apply=true weight=100
    IKMarkerTask RASI: apply=true weight=100
    IKMarkerTask RASI_posAnt: apply=true weight=100
    IKMarkerTask RASI_medLat: apply=true weight=100
    IKMarkerTask RASI_supInf: apply=true weight=100
    IKMarkerTask LPSI: apply=true weight=100
    IKMarkerTask LPSI_posAnt: apply=true weight=100
    IKMarkerTask LPSI_medLat: apply=true weight=100
    IKMarkerTask LPSI_supInf: apply=true weight=100
    IKMarkerTask RPSI: apply=true weight=100
    IKMarkerTask RPSI_posAnt: apply=true weight=100
    IKMarkerTask RPSI_medLat: apply=true weight=100
    IKMarkerTask RPSI_supInf: apply=true weight=100
    IKMarkerTask RTHI: apply=true weight=100
    IKMarkerTask RTHI_posAnt: apply=true weight=100
    IKMarkerTask RTHI_medLat: apply=true weight=100
    IKMarkerTask RTHI_proDis: apply=true weight=100
    IKMarkerTask RKNE: apply=true weight=100
    IKMarkerTask RKNE_posAnt: apply=true weight=100
    IKMarkerTask RKNE_medLat: apply=true weight=100
    IKMarkerTask RKNE_proDis: apply=true weight=100
    IKMarkerTask RTIB: apply=true weight=100
    IKMarkerTask RTIB_posAnt: apply=true weight=100
    IKMarkerTask RTIB_medLat: apply=true weight=100
    IKMarkerTask RTIB_proDis: apply=true weight=100
    IKMarkerTask RANK: apply=true weight=100
    IKMarkerTask RANK_posAnt: apply=true weight=100
    IKMarkerTask RANK_medLat: apply=true weight=100
    IKMarkerTask RANK_proDis: apply=true weight=100
    IKMarkerTask RHEE: apply=true weight=100
    IKMarkerTask RHEE_supInf: apply=true weight=100
    IKMarkerTask RHEE_medLat: apply=true weight=100
    IKMarkerTask RHEE_proDis: apply=true weight=100
    IKMarkerTask RTOE: apply=true weight=100
    IKMarkerTask RTOE_supInf: apply=true weight=100
    IKMarkerTask RTOE_medLat: apply=true weight=100
    IKMarkerTask RTOE_proDis: apply=true weight=100
    IKMarkerTask LTHI: apply=true weight=100
    IKMarkerTask LTHI_posAnt: apply=true weight=100
    IKMarkerTask LTHI_medLat: apply=true weight=100
    IKMarkerTask LTHI_proDis: apply=true weight=100
    IKMarkerTask LKNE: apply=true weight=100
    IKMarkerTask LKNE_posAnt: apply=true weight=100
    IKMarkerTask LKNE_medLat: apply=true weight=100
    IKMarkerTask LKNE_proDis: apply=true weight=100
    IKMarkerTask LTIB: apply=true weight=100
    IKMarkerTask LTIB_posAnt: apply=true weight=100
    IKMarkerTask LTIB_medLat: apply=true weight=100
    IKMarkerTask LTIB_proDis: apply=true weight=100
    IKMarkerTask LANK: apply=true weight=100
    IKMarkerTask LANK_posAnt: apply=true weight=100
    IKMarkerTask LANK_medLat: apply=true weight=100
    IKMarkerTask LANK_proDis: apply=true weight=100
    IKMarkerTask LHEE: apply=true weight=100
    IKMarkerTask LHEE_supInf: apply=true weight=100
    IKMarkerTask LHEE_medLat: apply=true weight=100
    IKMarkerTask LHEE_proDis: apply=true weight=100
    IKMarkerTask LTOE: apply=true weight=100
    IKMarkerTask LTOE_supInf: apply=true weight=100
    IKMarkerTask LTOE_medLat: apply=true weight=100
    IKMarkerTask LTOE_proDis: apply=true weight=100
