# OpenSim document version 30000
MarkerSet:
  Marker LASI: pelvis (0.0080898 0.0101666 -0.124647)
  Marker LASI_posAnt: pelvis (0.0080898 0.0101666 -0.124647)
  Marker LASI_medLat: pelvis (0.0080898 0.0101666 -0.124647)
  Marker LASI_supInf: pelvis (0.0080898 0.0101666 -0.124647)
  Marker RASI: pelvis (-0.00597153 0.00359413 0.127307)
  Marker RASI_posAnt: pelvis (-0.00597153 0.00359413 0.127307)
  Marker RASI_medLat: pelvis (-0.00597153 0.00359413 0.127307)
  Marker RASI_supInf: pelvis (-0.00597153 0.00359413 0.127307)
  Marker LPSI: pelvis (-0.183608 0.0634621 -0.0680169)
  Marker LPSI_posAnt: pelvis (-0.183608 0.0634621 -0.0680169)
  Marker LPSI_medLat: pelvis (-0.183608 0.0634621 -0.0680169)
  Marker LPSI_supInf: pelvis (-0.183608 0.0634621 -0.0680169)
  Marker RPSI: pelvis (-0.180909 0.0634337 0.0546326)
  Marker RPSI_posAnt: pelvis (-0.180909 0.0634337 0.0546326)
  Marker RPSI_medLat: pelvis (-0.180909 0.0634337 0.0546326)
  Marker RPSI_supInf: pelvis (-0.180909 0.0634337 0.0546326)
  Marker LTHI: femur_l (-0.00399242 -0.20754 -0.0999247)
  Marker LTHI_posAnt: femur_l (-0.00399242 -0.20754 -0.0999247)
  Marker LTHI_medLat: femur_l (-0.00399242 -0.20754 -0.0999247)
  Marker LTHI_proDis: femur_l (-0.00399242 -0.20754 -0.0999247)
  Marker LKNE: femur_l (0 -0.415174 -0.0525)
  Marker LKNE_posAnt: femur_l (0 -0.415174 -0.0525)
  Marker LKNE_medLat: femur_l (0 -0.415174 -0.0525)
  Marker LKNE_proDis: femur_l (0 -0.415174 -0.0525)
  Marker RTHI: femur_r (-1.38556e-16 -0.224945 0.0909677)
  Marker RTHI_posAnt: femur_r (-1.38556e-16 -0.224945 0.0909677)
  Marker RTHI_medLat: femur_r (-1.38556e-16 -0.224945 0.0909677)
  Marker RTHI_proDis: femur_r (-1.38556e-16 -0.224945 0.0909677)
  Marker RKNE: femur_r (3.72529e-9 -0.402651 0.0527368)
  Marker RKNE_posAnt: femur_r (3.72529e-9 -0.402651 0.0527368)
  Marker RKNE_medLat: femur_r (3.72529e-9 -0.402651 0.0527368)
  Marker RKNE_proDis: femur_r (3.72529e-9 -0.402651 0.0527368)
  Marker LTIB: tibia_l (2.39808e-16 -0.1859 -0.0715228)
  Marker LTIB_posAnt: tibia_l (2.39808e-16 -0.1859 -0.0715228)
  Marker LTIB_medLat: tibia_l (2.39808e-16 -0.1859 -0.0715228)
  Marker LTIB_proDis: tibia_l (2.39808e-16 -0.1859 -0.0715228)
  Marker LANK: tibia_l (0 -0.424826 -0.04)
  Marker LANK_posAnt: tibia_l (0 -0.424826 -0.04)
  Marker LANK_medLat: tibia_l (0 -0.424826 -0.04)
  Marker LANK_proDis: tibia_l (0 -0.424826 -0.04)
  Marker RTIB: tibia_r (-1.77636e-17 -0.206151 0.0710892)
  Marker RTIB_posAnt: tibia_r (-1.77636e-17 -0.206151 0.0710892)
  Marker RTIB_medLat: tibia_r (-1.77636e-17 -0.206151 0.0710892)
  Marker RTIB_proDis: tibia_r (-1.77636e-17 -0.206151 0.0710892)
  Marker RANK: tibia_r (-0.00969172 -0.418783 0.0429379)
  Marker RANK_posAnt: tibia_r (-0.00969172 -0.418783 0.0429379)
  Marker RANK_medLat: tibia_r (-0.00969172 -0.418783 0.0429379)
  Marker RANK_proDis: tibia_r (-0.00969172 -0.418783 0.0429379)
  Marker RHEE: calcn_r (-0.0645362 -0.0271254 -0.0145158)
  Marker RHEE_supInf: calcn_r (-0.0645362 -0.0271254 -0.0145158)
  Marker RHEE_medLat: calcn_r (-0.0645362 -0.0271254 -0.0145158)
  Marker RHEE_proDis: calcn_r (-0.0645362 -0.0271254 -0.0145158)
  Marker RTOE: calcn_r (0.0817053 0.00652635 0.00423662)
  Marker RTOE_supInf: calcn_r (0.0817053 0.00652635 0.00423662)
  Marker RTOE_medLat: calcn_r (0.0817053 0.00652635 0.00423662)
  Marker RTOE_proDis: calcn_r (0.0817053 0.00652635 0.00423662)
  Marker LHEE: calcn_l (-0.0645362 -0.0271254 -0.0145158)
  Marker LHEE_supInf: calcn_l (-0.0645362 -0.0271254 -0.0145158)
  Marker LHEE_medLat: calcn_l (-0.0645362 -0.0271254 -0.0145158)
  Marker LHEE_proDis: calcn_l (-0.0645362 -0.0271254 -0.0145158)
  Marker LTOE: calcn_l (0.0817053 0.00652635 0.00423662)
  Marker LTOE_supInf: calcn_l (0.0817053 0.00652635 0.00423662)
  Marker LTOE_medLat: calcn_l (0.0817053 0.00652635 0.00423662)
  Marker LTOE_proDis: calcn_l (0.0817053 0.00652635 0.00423662)
