# OpenSim document version 30000
InverseKinematicsTool:
  results_directory: ./
  constraint_weight: Inf
  accuracy: 1e-8
  report_errors: true
  report_marker_locations: true
  IKTaskSet:
    IKMarkerTask LASI: apply=false weight=0
    IKMarkerTask LASI_posAnt: apply=true weight=100
    IKMarkerTask LASI_medLat: apply=true weight=100
    IKMarkerTask LASI_supInf: apply=true weight=100
    IKMarkerTask RASI: apply=false weight=0
    IKMarkerTask RASI_posAnt: apply=true weight=100
    IKMarkerTask RASI_medLat: apply=true weight=100
    IKMarkerTask RASI_supInf: apply=true weight=100
    IKMarkerTask LPSI: apply=false weight=0
    IKMarkerTask LPSI_posAnt: apply=true weight=100
    IKMarkerTask LPSI_medLat: apply=true weight=100
    IKMarkerTask LPSI_supInf: apply=true weight=100
    IKMarkerTask RPSI: apply=false weight=0
    IKMarkerTask RPSI_posAnt: apply=true weight=100
    IKMarkerTask RPSI_medLat: apply=true weight=100
    IKMarkerTask RPSI_supInf: apply=true weight=100
    IKMarkerTask RTHI: apply=false weight=0
    IKMarkerTask RTHI_posAnt: apply=true weight=100
    IKMarkerTask RTHI_medLat: apply=true weight=100
    IKMarkerTask RTHI_proDis: apply=true weight=100
    IKMarkerTask RKNE: apply=false weight=0
    IKMarkerTask RKNE_posAnt: apply=true weight=100
    IKMarkerTask RKNE_medLat: apply=true weight=100
    IKMarkerTask RKNE_proDis: apply=true weight=100
    IKMarkerTask RTIB: apply=false weight=0
    IKMarkerTask RTIB_posAnt: apply=true weight=100
    IKMarkerTask RTIB_medLat: apply=true weight=100
    IKMarkerTask RTIB_proDis: apply=true weight=100
    IKMarkerTask RANK: apply=false weight=0
    IKMarkerTask RANK_posAnt: apply=true weight=100
    IKMarkerTask RANK_medLat: apply=true weight=100
    IKMarkerTask RANK_proDis: apply=true weight=100
    IKMarkerTask RHEE: apply=false weight=0
    IKMarkerTask RHEE_supInf: apply=true weight=100
    IKMarkerTask RHEE_medLat: apply=true weight=100
    IKMarkerTask RHEE_proDis: apply=true weight=100
    IKMarkerTask RTOE: apply=false weight=0
    IKMarkerTask RTOE_supInf: apply=true weight=100
    IKMarkerTask RTOE_medLat: apply=true weight=100
    IKMarkerTask RTOE_proDis: apply=true weight=100
    IKMarkerTask LTHI: apply=false weight=0
    IKMarkerTask LTHI_posAnt: apply=true weight=100
    IKMarkerTask LTHI_medLat: apply=true weight=100
    IKMarkerTask LTHI_proDis: apply=true weight=100
    IKMarkerTask LKNE: apply=false weight=0
    IKMarkerTask LKNE_posAnt: apply=true weight=100
    IKMarkerTask LKNE_medLat: apply=true weight=100
    IKMarkerTask LKNE_proDis: apply=true weight=100
    IKMarkerTask LTIB: apply=false weight=0
    IKMarkerTask LTIB_posAnt: apply=true weight=100
    IKMarkerTask LTIB_medLat: apply=true weight=100
    IKMarkerTask LTIB_proDis: apply=true weight=100
    IKMarkerTask LANK: apply=false weight=0
    IKMarkerTask LANK_posAnt: apply=true weight=100
    IKMarkerTask LANK_medLat: apply=true weight=100
    IKMarkerTask LANK_proDis: apply=true weight=100
    IKMarkerTask LHEE: apply=false weight=0
    IKMarkerTask LHEE_supInf: apply=true weight=100
    IKMarkerTask LHEE_medLat: apply=true weight=100
    IKMarkerTask LHEE_proDis: apply=true weight=100
    IKMarkerTask LTOE: apply=false weight=0
    IKMarkerTask LTOE_supInf: apply=true weight=100
    IKMarkerTask LTOE_medLat: apply=true weight=100
    IKMarkerTask LTOE_proDis: apply=true weight=100
    IKMarkerTask LTHIAP: apply=false weight=0
    IKMarkerTask LTHIAP_posAnt: apply=true weight=100
    IKMarkerTask LTHIAP_medLat: apply=true weight=100
    IKMarkerTask LTHIAP_proDis: apply=true weight=100
    IKMarkerTask LTHIAD: apply=false weight=0
    IKMarkerTask LTHIAD_posAnt: apply=true weight=100
    IKMarkerTask LTHIAD_medLat: apply=true weight=100
    IKMarkerTask LTHIAD_proDis: apply=true weight=100
    IKMarkerTask LTIBAP: apply=false weight=0
    IKMarkerTask LTIBAP_posAnt: apply=true weight=100
    IKMarkerTask LTIBAP_medLat: apply=true weight=100
    IKMarkerTask LTIBAP_proDis: apply=true weight=100
    IKMarkerTask LTIBAD: apply=false weight=0
    IKMarkerTask LTIBAD_posAnt: apply=true weight=100
    IKMarkerTask LTIBAD_medLat: apply=true weight=100
    IKMarkerTask LTIBAD_proDis: apply=true weight=100
    IKMarkerTask RTHIAP: apply=false weight=0
    IKMarkerTask RTHIAP_posAnt: apply=true weight=100
    IKMarkerTask RTHIAP_medLat: apply=true weight=100
    IKMarkerTask RTHIAP_proDis: apply=true weight=100
    IKMarkerTask RTHIAD: apply=false weight=0
    IKMarkerTask RTHIAD_posAnt: apply=true weight=100
    IKMarkerTask RTHIAD_medLat: apply=true weight=100
    IKMarkerTask RTHIAD_proDis: apply=true weight=100
    IKMarkerTask RTIBAP: apply=false weight=0
    IKMarkerTask RTIBAP_posAnt: apply=true weight=100
    IKMarkerTask RTIBAP_medLat: apply=true weight=100
    IKMarkerTask RTIBAP_proDis: apply=true weight=100
    IKMarkerTask RTIBAD: apply=false weight=0
    IKMarkerTask RTIBAD_posAnt: apply=true weight=100
    IKMarkerTask RTIBAD_medLat: apply=true weight=100
    IKMarkerTask RTIBAD_proDis: apply=true weight=100
    IKMarkerTask LPAT: apply=false weight=0
    IKMarkerTask LPAT_posAnt: apply=false weight=0
    IKMarkerTask LPAT_medLat: apply=false weight=0
    IKMarkerTask LPAT_proDis: apply=false weight=0
    IKMarkerTask LTHLD: apply=false weight=0
    IKMarkerTask LTHLD_posAnt: apply=false weight=0
    IKMarkerTask LTHLD_medLat: apply=false weight=0
    IKMarkerTask LTHLD_proDis: apply=false weight=0
    IKMarkerTask RPAT: apply=false weight=0
    IKMarkerTask RPAT_posAnt: apply=false weight=0
    IKMarkerTask RPAT_medLat: apply=false weight=0
    IKMarkerTask RPAT_proDis: apply=false weight=0
    IKMarkerTask RTHLD: apply=false weight=0
    IKMarkerTask RTHLD_posAnt: apply=false weight=0
    IKMarkerTask RTHLD_medLat: apply=false weight=0
    IKMarkerTask RTHLD_proDis: apply=false weight=0
    IKMarkerTask RCUN: apply=false weight=0
    IKMarkerTask RCUN_supInf: apply=true weight=100
    IKMarkerTask RCUN_medLat: apply=true weight=100
    IKMarkerTask RCUN_proDis: apply=true weight=100
    IKMarkerTask RD1M: apply=false weight=0
    IKMarkerTask RD1M_supInf: apply=true weight=100
    IKMarkerTask RD1M_medLat: apply=true weight=100
    IKMarkerTask RD1M_proDis: apply=true weight=100
    IKMarkerTask RD5M: apply=false weight=0
    IKMarkerTask RD5M_supInf: apply=true weight=100
    IKMarkerTask RD5M_medLat: apply=true weight=100
    IKMarkerTask RD5M_proDis: apply=true weight=100
    IKMarkerTask LCUN: apply=false weight=0
    IKMarkerTask LCUN_supInf: apply=true weight=100
    IKMarkerTask LCUN_medLat: apply=true weight=100
    IKMarkerTask LCUN_proDis: apply=true weight=100
    IKMarkerTask LD1M: apply=false weight=0
    IKMarkerTask LD1M_supInf: apply=true weight=100
    IKMarkerTask LD1M_medLat: apply=true weight=100
    IKMarkerTask LD1M_proDis: apply=true weight=100
    IKMarkerTask LD5M: apply=false weight=0
    IKMarkerTask LD5M_supInf: apply=true weight=100
    IKMarkerTask LD5M_medLat: apply=true weight=100
    IKMarkerTask LD5M_proDis: apply=true weight=100
