# OpenSim document version 30000
Model fitted model:
  credits: Fabien Leboeuf
  length_units: meters
  force_units: N
  gravity: 0 -9.80665 0
  publications:
    - 3dof at each joint
    - subtalar angle blocked
    - midFoot joint added around Cuneiform marker
    - Notice :
    * calcaneus and talus share same coordinate system. I have just moved out the vtp object through its transform node
    * foreFoot joint shift from the forefoot origin
  BodySet:
    Body ground: mass=0 mass_center=(0 0 0) inertia_xx=0 inertia_yy=0 inertia_zz=0 meshes=
    Body pelvis: mass=11.777 mass_center=(-0.0707 0 0) inertia_xx=0.1028 inertia_yy=0.0871 inertia_zz=0.0579
        meshes=(sacrum.vtp pelvis.vtp l_pelvis.vtp)
      CustomJoint ground_pelvis: parent_body=ground location_in_parent=(0 0 0) location=(0 0 0)
        Coordinate pelvis_rotation: motion_type=rotational default_value=0 range=(-1.570796 1.570796) clamped=false
        Coordinate pelvis_list: motion_type=rotational default_value=0 range=(-1.570796 1.570796) clamped=false
        Coordinate pelvis_tilt: motion_type=rotational default_value=0 range=(-1.570796 1.570796) clamped=false
        Coordinate pelvis_tx: motion_type=translational default_value=0 range=(-5 5) clamped=false
        Coordinate pelvis_ty: motion_type=translational default_value=0 range=(-3 3) clamped=false
        Coordinate pelvis_tz: motion_type=translational default_value=0 range=(-3 3) clamped=false
        SpatialTransform:
          TransformAxis rotation1: coordinates=pelvis_rotation axis=(0 1 0) LinearFunction(coefficients=1 0)
          TransformAxis rotation2: coordinates=pelvis_list axis=(1 0 0) LinearFunction(coefficients=1 0)
          TransformAxis rotation3: coordinates=pelvis_tilt axis=(0 0 1) LinearFunction(coefficients=1 0)
          TransformAxis translation1: coordinates=pelvis_tx axis=(1 0 0) LinearFunction(coefficients=1 0)
          TransformAxis translation2: coordinates=pelvis_ty axis=(0 1 0) LinearFunction(coefficients=1 0)
          TransformAxis translation3: coordinates=pelvis_tz axis=(0 0 1) LinearFunction(coefficients=1 0)
    Body femur_r: mass=9.3014 mass_center=(0 -0.17 0) inertia_xx=0.1339 inertia_yy=0.0351 inertia_zz=0.1412
        meshes=femur.vtp
      CustomJoint hip_r: parent_body=pelvis location_in_parent=(-0.052495 -0.07647 0.08239) location=(0 0 0)
        Coordinate hip_flexion_r: motion_type=rotational default_value=0 range=(-2.094395 2.094395) clamped=false
        Coordinate hip_adduction_r: motion_type=rotational default_value=0 range=(-2.094395 2.094395) clamped=false
        Coordinate hip_rotation_r: motion_type=rotational default_value=0 range=(-2.094395 2.094395) clamped=false
        SpatialTransform: axes_held_at_zero=(translation1 translation2 translation3)
          TransformAxis rotation1: coordinates=hip_flexion_r axis=(0 0 1) LinearFunction(coefficients=1 0)
          TransformAxis rotation2: coordinates=hip_adduction_r axis=(1 0 0) LinearFunction(coefficients=1 0)
          TransformAxis rotation3: coordinates=hip_rotation_r axis=(0 1 0) LinearFunction(coefficients=1 0)
    Body tibia_r: mass=3.7075 mass_center=(0 -0.1867 0) inertia_xx=0.0504 inertia_yy=0.0051 inertia_zz=0.0511
        meshes=(tibia.vtp fibula.vtp)
      CustomJoint knee_r: parent_body=femur_r location_in_parent=(0 -0.4000734 0) location=(0 0 0)
        Coordinate knee_flexion_r: motion_type=rotational default_value=0 range=(-2.094395 0.1745329) clamped=false
        Coordinate knee_adduction_r: motion_type=rotational default_value=0 range=(-0.5235988 0.5235988) clamped=false
        Coordinate knee_rotation_r: motion_type=rotational default_value=0 range=(-0.5235988 0.5235988) clamped=false
        SpatialTransform: axes_held_at_zero=(translation1 translation2 translation3)
          TransformAxis rotation1: coordinates=knee_flexion_r axis=(0 0 1) LinearFunction(coefficients=1 0)
          TransformAxis rotation2: coordinates=knee_adduction_r axis=(1 0 0) LinearFunction(coefficients=1 0)
          TransformAxis rotation3: coordinates=knee_rotation_r axis=(0 1 0) LinearFunction(coefficients=1 0)
    Body talus_r: mass=0.1 mass_center=(0 0 0) inertia_xx=0.001 inertia_yy=0.001 inertia_zz=0.001 meshes=talus.vtp
      CustomJoint ankle_r: parent_body=tibia_r location_in_parent=(-8.881784e-19 -0.4152871 0) location=(0 0 0)
        Coordinate ankle_flexion_r: motion_type=rotational default_value=0 range=(-0.6981317 0.5235988) clamped=false
        Coordinate ankle_adduction_r: motion_type=rotational default_value=0 range=(-0.5235988 0.5235988) clamped=false
        Coordinate ankle_rotation_r: motion_type=rotational default_value=0 range=(-0.6981317 0.6981317) clamped=false
        SpatialTransform: axes_held_at_zero=(translation1 translation2 translation3)
          TransformAxis rotation1: coordinates=ankle_flexion_r axis=(0 0 1) LinearFunction(coefficients=1 0)
          TransformAxis rotation2: coordinates=ankle_adduction_r axis=(0 1 0) LinearFunction(coefficients=1 0)
          TransformAxis rotation3: coordinates=ankle_rotation_r axis=(1 0 0) LinearFunction(coefficients=1 0)
    Body calcn_r: mass=1.25 mass_center=(0.1 0.03 0) inertia_xx=0.0014 inertia_yy=0.0039 inertia_zz=0.0041
        meshes=foot.vtp
      CustomJoint subtalar_r: parent_body=talus_r location_in_parent=(0 0 0) location=(0 0 0)
        Coordinate subtalar_angle_r: motion_type=rotational default_value=0 range=(-1.570796 1.570796) clamped=false
            locked=true
        SpatialTransform: axes_held_at_zero=(rotation2 rotation3 translation1 translation2 translation3)
          TransformAxis rotation1: coordinates=subtalar_angle_r axis=(0.7871796 0.6047475 -0.1209495)
              LinearFunction(coefficients=1 0)
    Body toes_r: mass=0.2166 mass_center=(0.0346 0.006 -0.0175) inertia_xx=0.0001 inertia_yy=0.0002 inertia_zz=0.001
        meshes=bofoot.vtp
      CustomJoint mtp_r: parent_body=calcn_r location_in_parent=(0.0817053 0.00652635 0.00423662)
          location=(-0.05 0.05 0.01)
        Coordinate forefoot_flexion_r: motion_type=rotational default_value=0 range=(-0.6981317 0.5235988)
            clamped=false
        Coordinate forefoot_adduction_r: motion_type=rotational default_value=0 range=(-0.6981317 0.6981317)
            clamped=false
        Coordinate forefoot_rotation_r: motion_type=rotational default_value=0 range=(-0.6981317 0.6981317)
            clamped=false
        SpatialTransform: axes_held_at_zero=(translation1 translation2 translation3)
          TransformAxis rotation1: coordinates=forefoot_flexion_r axis=(0 0 1) LinearFunction(coefficients=1 0)
          TransformAxis rotation2: coordinates=forefoot_adduction_r axis=(0 1 0) LinearFunction(coefficients=1 0)
          TransformAxis rotation3: coordinates=forefoot_rotation_r axis=(1 0 0) LinearFunction(coefficients=1 0)
    Body femur_l: mass=9.3014 mass_center=(0 -0.17 0) inertia_xx=0.1339 inertia_yy=0.0351 inertia_zz=0.1412
        meshes=l_femur.vtp
      CustomJoint hip_l: parent_body=pelvis location_in_parent=(-0.05218 -0.07608 -0.08196) location=(0 0 0)
        Coordinate hip_flexion_l: motion_type=rotational default_value=0 range=(-2.094395 2.094395) clamped=false
        Coordinate hip_adduction_l: motion_type=rotational default_value=0 range=(-2.094395 2.094395) clamped=false
        Coordinate hip_rotation_l: motion_type=rotational default_value=0 range=(-2.094395 2.094395) clamped=false
        SpatialTransform: axes_held_at_zero=(translation1 translation2 translation3)
          TransformAxis rotation1: coordinates=hip_flexion_l axis=(0 0 1) LinearFunction(coefficients=1 0)
          TransformAxis rotation2: coordinates=hip_adduction_l axis=(-1 0 0) LinearFunction(coefficients=1 0)
          TransformAxis rotation3: coordinates=hip_rotation_l axis=(0 -1 0) LinearFunction(coefficients=1 0)
    Body tibia_l: mass=3.7075 mass_center=(0 -0.1867 0) inertia_xx=0.0504 inertia_yy=0.0051 inertia_zz=0.0511
        meshes=(l_tibia.vtp l_fibula.vtp)
      CustomJoint knee_l: parent_body=femur_l location_in_parent=(7.105427e-18 -0.4089423 0) location=(0 0 0)
        Coordinate knee_flexion_l: motion_type=rotational default_value=0 range=(-2.094395 0.1745329) clamped=false
        Coordinate knee_adduction_l: motion_type=rotational default_value=0 range=(-0.5235988 0.5235988) clamped=false
        Coordinate knee_rotation_l: motion_type=rotational default_value=0 range=(-0.5235988 0.5235988) clamped=false
        SpatialTransform: axes_held_at_zero=(translation1 translation2 translation3)
          TransformAxis rotation1: coordinates=knee_flexion_l axis=(0 0 1) LinearFunction(coefficients=1 0)
          TransformAxis rotation2: coordinates=knee_adduction_l axis=(-1 0 0) LinearFunction(coefficients=1 0)
          TransformAxis rotation3: coordinates=knee_rotation_l axis=(0 -1 0) LinearFunction(coefficients=1 0)
    Body talus_l: mass=0.1 mass_center=(0 0 0) inertia_xx=0.001 inertia_yy=0.001 inertia_zz=0.001 meshes=l_talus.vtp
      CustomJoint ankle_l: parent_body=tibia_l location_in_parent=(-3.552714e-18 -0.4096103 0) location=(0 0 0)
        Coordinate ankle_flexion_l: motion_type=rotational default_value=0 range=(-0.6981317 0.5235988) clamped=false
        Coordinate ankle_adduction_l: motion_type=rotational default_value=0 range=(-0.5235988 0.5235988) clamped=false
        Coordinate ankle_rotation_l: motion_type=rotational default_value=0 range=(-0.6981317 0.6981317) clamped=false
        SpatialTransform: axes_held_at_zero=(translation1 translation2 translation3)
          TransformAxis rotation1: coordinates=ankle_flexion_l axis=(0 0 1) LinearFunction(coefficients=1 0)
          TransformAxis rotation2: coordinates=ankle_adduction_l axis=(0 -1 0) LinearFunction(coefficients=1 0)
          TransformAxis rotation3: coordinates=ankle_rotation_l axis=(-1 0 0) LinearFunction(coefficients=1 0)
    Body calcn_l: mass=1.25 mass_center=(0.1 0.03 0) inertia_xx=0.0014 inertia_yy=0.0039 inertia_zz=0.0041
        meshes=l_foot.vtp
      CustomJoint subtalar_l: parent_body=talus_l location_in_parent=(0 0 0) location=(0 0 0)
        Coordinate subtalar_angle_l: motion_type=rotational default_value=0 range=(-1.570796 1.570796) clamped=false
            locked=true
        SpatialTransform: axes_held_at_zero=(rotation2 rotation3 translation1 translation2 translation3)
          TransformAxis rotation1: coordinates=subtalar_angle_l axis=(-0.7871796 -0.6047475 -0.1209495)
              LinearFunction(coefficients=1 0)
    Body toes_l: mass=0.2166 mass_center=(0.0346 0.006 0.0175) inertia_xx=0.0001 inertia_yy=0.0002 inertia_zz=0.001
        meshes=l_bofoot.vtp
      CustomJoint mtp_l: parent_body=calcn_l location_in_parent=(0.0817053 0.00652635 0.00423662)
          location=(-0.05 0.05 0.01)
        Coordinate forefoot_flexion_l: motion_type=rotational default_value=0 range=(-0.6981317 0.5235988)
            clamped=false
        Coordinate forefoot_adduction_l: motion_type=rotational default_value=0 range=(-0.6981317 0.6981317)
            clamped=false
        Coordinate forefoot_rotation_l: motion_type=rotational default_value=0 range=(-0.6981317 0.6981317)
            clamped=false
        SpatialTransform: axes_held_at_zero=(translation1 translation2 translation3)
          TransformAxis rotation1: coordinates=forefoot_flexion_l axis=(0 0 1) LinearFunction(coefficients=1 0)
          TransformAxis rotation2: coordinates=forefoot_adduction_l axis=(0 -1 0) LinearFunction(coefficients=1 0)
          TransformAxis rotation3: coordinates=forefoot_rotation_l axis=(-1 0 0) LinearFunction(coefficients=1 0)
  MarkerSet:
    Marker LASI: pelvis (9.36057e-18 -1.13354e-16 -0.105581)
    Marker RASI: pelvis (9.33975e-18 -1.13243e-16 0.105581)
    Marker LPSI: pelvis (-0.1871 0.00216383 -0.0401126)
    Marker RPSI: pelvis (-0.185258 -0.00216383 0.041657)
    Marker LTHI: femur_l (0.00168435 -0.243615 -0.13676)
    Marker LKNE: femur_l (7.10543e-18 -0.40604 -0.0579273)
    Marker RTHI: femur_r (0.00631343 -0.215086 0.142186)
    Marker RKNE: femur_r (0 -0.39775 0.058654)
    Marker LTIB: tibia_l (-2.14051e-16 -0.186103 -0.138707)
    Marker LANK: tibia_l (3.55271e-18 -0.40961 -0.04465)
    Marker RTIB: tibia_r (-1.55431e-17 -0.205334 0.12975)
    Marker RANK: tibia_r (-4.44089e-18 -0.415287 0.04345)
    Marker RHEE: calcn_r (-0.0589552 -0.00823087 0.00644553)
    Marker RTOE: calcn_r (0.105767 -0.00823087 0.00644553)
    Marker LHEE: calcn_l (-0.0657454 -0.00776131 0.00170475)
    Marker LTOE: calcn_l (0.0949036 -0.00776131 0.00170475)
