# OpenSim document version 30000
MarkerSet:
  Marker midASIS: pelvis (0 0 0)
  Marker LASI: pelvis (0.0080898 0.0101666 -0.124647)
  Marker RASI: pelvis (-0.00597153 0.00359413 0.127307)
  Marker LPSI: pelvis (-0.183608 0.0634621 -0.0680169)
  Marker RPSI: pelvis (-0.180909 0.0634337 0.0546326)
  Marker SACR: pelvis (-0.183608 0.0634337 0)
  Marker LHJC: pelvis (-0.0707 -0.0661 -0.0835) fixed=true
  Marker RHJC: pelvis (-0.0707 -0.0661 0.0835) fixed=true
  Marker midHJC: pelvis (-0.0707 -0.0661 0)
  Marker pelvisCentre: pelvis (-0.091804 0.03171685 0)
  Marker LTHI: femur_l (-0.00399242 -0.20754 -0.0999247)
  Marker LKNE: femur_l (0 -0.415174 -0.0525)
  Marker LKJC: femur_l (0 -0.395 0) fixed=true
  Marker LKNM: femur_l (0 -0.415174 0.0525)
  Marker RTHI: femur_r (0.002865 -0.233089 0.128454)
  Marker RKNE: femur_r (3.72529e-9 -0.402651 0.0527368)
  Marker RKJC: femur_r (0 -0.395 0) fixed=true
  Marker RKNM: femur_r (0 -0.402651 -0.0527368)
  Marker LTIB: tibia_l (-0.0208461 -0.192153 -0.10025)
  Marker LANK: tibia_l (0 -0.424826 -0.04)
  Marker LAJC: tibia_l (0 -0.43 0) fixed=true
  Marker LMED: tibia_l (-0.00969172 -0.424826 0.04)
  Marker RTIB: tibia_r (-1.77636e-17 -0.206151 0.0710892)
  Marker RANK: tibia_r (-0.00969172 -0.418783 0.0429379)
  Marker RAJC: tibia_r (0 -0.43 0) fixed=true
  Marker RMED: tibia_r (-0.00969172 -0.418783 -0.0429379)
  Marker RHEE: calcn_r (-0.0645362 -0.0271254 -0.0145158)
  Marker RTOE: calcn_r (0.0817053 0.00652635 0.00423662)
  Marker LHEE: calcn_l (-0.0645362 -0.0271254 -0.0145158)
  Marker LTOE: calcn_l (0.0817053 0.00652635 0.00423662)
