# OpenSim document version 30000
InverseKinematicsTool:
  results_directory: ./
  model_file: static-CGM22-ScaledModel.osim
  constraint_weight: 20
  accuracy: 1e-5
  marker_file: gait1.trc
  time_range: 0 2.74
  report_errors: true
  timeScale: 20
  order: 4
  sdProcess: 15
  sdMeas: 0.03
  use_visualizer: false
  output_motion_file: gait1_ks.mot
  report_marker_locations: true
  IKTaskSet gait2392_KS:
    IKMarkerTask LASI: apply=true weight=2
    IKMarkerTask RASI: apply=true weight=2
    IKMarkerTask LPSI: apply=true weight=2
    IKMarkerTask RPSI: apply=true weight=2
    IKMarkerTask RTHI: apply=true weight=2
    IKMarkerTask RKNE: apply=true weight=2
    IKMarkerTask RTIB: apply=true weight=2
    IKMarkerTask RANK: apply=true weight=2
    IKMarkerTask RHEE: apply=true weight=2
    IKMarkerTask RTOE: apply=true weight=2
    IKMarkerTask LTHI: apply=true weight=2
    IKMarkerTask LKNE: apply=true weight=2
    IKMarkerTask LTIB: apply=true weight=2
    IKMarkerTask LANK: apply=true weight=2
    IKMarkerTask LHEE: apply=true weight=2
    IKMarkerTask LTOE: apply=true weight=2
