# OpenSim document version 40000
ScaleTool cgm2-Osim-scaled:
  mass: 40.928 [kg]
  height: -1
  age: -1
  GenericModelMaker:
    marker_set_file: C:\Users\fleboeuf\Documents\Programmation\pyCGM2\pyCGM2\pyCGM2\Settings\opensim\models\cgm23-scaling\cgm2_3-markerset.xml
  ModelScaler:
    apply: true
    scaling_order: measurements
    marker_file: C:\Users\fleboeuf\Documents\Programmation\pyCGM2\pyCGM2\pyCGM2\Settings\opensim\models\cgm23-scaling\staticVerif.trc
    time_range: 0 0.08
    preserve_mass_distribution: true
    MeasurementSet:
      Measurement pelvis-AntPos: apply=true
        MarkerPair: markers=(SACR midASIS)
        BodyScale pelvis: axes=X
      Measurement pelvis-ProDis: apply=true
        MarkerPair: markers=(midHJC pelvisCentre)
        BodyScale pelvis: axes=Y
      Measurement pelvis-MedLat: apply=true
        MarkerPair: markers=(LHJC RHJC)
        BodyScale pelvis: axes=Z
  MarkerPlacer:
    apply: false
    time_range: -1 -1
    max_marker_movement: -1
    IKTaskSet:
      IKMarkerTask midASIS: apply=true weight=1
      IKMarkerTask LASI: apply=true weight=1
      IKMarkerTask RASI: apply=true weight=1
      IKMarkerTask LPSI: apply=true weight=1
      IKMarkerTask RPSI: apply=true weight=1
      IKMarkerTask SACR: apply=true weight=1
      IKMarkerTask LHJC: apply=true weight=1
      IKMarkerTask RHJC: apply=true weight=1
      IKMarkerTask midHJC: apply=true weight=1
      IKMarkerTask pelvisCentre: apply=true weight=1
      IKMarkerTask LTHI: apply=true weight=1
      IKMarkerTask LKNE: apply=true weight=1
      IKMarkerTask LKJC: apply=true weight=1
      IKMarkerTask LKNM: apply=true weight=1
      IKMarkerTask RTHI: apply=true weight=1
      IKMarkerTask RKNE: apply=true weight=1
      IKMarkerTask RKJC: apply=true weight=1
      IKMarkerTask RKNM: apply=true weight=1
      IKMarkerTask LTIB: apply=true weight=1
      IKMarkerTask LANK: apply=true weight=1
      IKMarkerTask LAJC: apply=true weight=1
      IKMarkerTask LMED: apply=true weight=1
      IKMarkerTask RTIB: apply=true weight=1
      IKMarkerTask RANK: apply=true weight=1
      IKMarkerTask RAJC: apply=true weight=1
      IKMarkerTask RMED: apply=true weight=1
      IKMarkerTask RHEE: apply=true weight=1
      IKMarkerTask RTOE: apply=true weight=1
      IKMarkerTask LHEE: apply=true weight=1
      IKMarkerTask LTOE: apply=true weight=1
      IKMarkerTask LTHAP: apply=true weight=1
      IKMarkerTask LTHAD: apply=true weight=1
      IKMarkerTask LTIAP: apply=true weight=1
      IKMarkerTask LTIAD: apply=true weight=1
      IKMarkerTask RTHAP: apply=true weight=1
      IKMarkerTask RTHAD: apply=true weight=1
      IKMarkerTask RTIAP: apply=true weight=1
      IKMarkerTask RTIAD: apply=true weight=1
      IKMarkerTask LTHLD: apply=true weight=1
      IKMarkerTask LPAT: apply=true weight=1
      IKMarkerTask RTHLD: apply=true weight=1
      IKMarkerTask RPAT: apply=true weight=1
