# OpenSim document version 40000
Model cgm2-Osim-scaled:
  gravity: 0 -9.80665 0
  credits: Fabien Leboeuf
  length_units: meters
  force_units: N
  publications:
    - 3dof at each joint
    - subtalar angle blocked
    - midFoot joint added around Cuneiform marker
    - Notice :
    * calcaneus and talus share same coordinate system. I have just moved out the vtp object through its transform node
    * foreFoot joint shift from the forefoot origin
  Ground: meshes=
  BodySet:
    Body pelvis: mass=20.43019 [kg] mass_center=(-0.06776066 0 0) inertia=(0.1783327 0.151097 0.1004422 0 0 0)
        meshes=(sacrum.vtp pelvis.vtp l_pelvis.vtp)
    Body femur_r: mass=16.13564 mass_center=(0 -0.17 0) inertia=(0.2322835 0.06088986 0.2449472 0 0 0)
        meshes=femur_r.vtp
    Body tibia_r: mass=6.431599 mass_center=(0 -0.1867 0) inertia=(0.08743159 0.008847244 0.08864591 0 0 0)
        meshes=(tibia_r.vtp fibula.vtp)
    Body talus_r: mass=0.1734754 mass_center=(0 0 0) inertia=(0.001734754 0.001734754 0.001734754 0 0 0)
        meshes=talus.vtp
    Body calcn_r: mass=2.168442 mass_center=(0.1 0.03 0) inertia=(0.002428655 0.006765539 0.00711249 0 0 0)
        meshes=foot.vtp
    Body toes_r: mass=0.3757477 mass_center=(0.0346 0.006 -0.0175)
        inertia=(0.0001734754 0.0003469507 0.001734754 0 0 0) meshes=bofoot.vtp
    Body femur_l: mass=16.13564 mass_center=(0 -0.17 0) inertia=(0.2322835 0.06088986 0.2449472 0 0 0)
        meshes=femur_l.vtp
    Body tibia_l: mass=6.431599 mass_center=(0 -0.1867 0) inertia=(0.08743159 0.008847244 0.08864591 0 0 0)
        meshes=(tibia_l.vtp l_fibula.vtp)
    Body talus_l: mass=0.1734754 mass_center=(0 0 0) inertia=(0.001734754 0.001734754 0.001734754 0 0 0)
        meshes=l_talus.vtp
    Body calcn_l: mass=2.168442 mass_center=(0.1 0.03 0) inertia=(0.002428655 0.006765539 0.00711249 0 0 0)
        meshes=l_foot.vtp
    Body toes_l: mass=0.3757477 mass_center=(0.0346 0.006 0.0175) inertia=(0.0001734754 0.0003469507 0.001734754 0 0 0)
        meshes=l_bofoot.vtp
  JointSet:
    CustomJoint ground_pelvis: socket_parent_frame=ground_offset socket_child_frame=pelvis_offset
      Coordinate pelvis_rotation: default_value=0 range=(-1.570796 1.570796) clamped=false
      Coordinate pelvis_list: default_value=0 range=(-1.570796 1.570796) clamped=false
      Coordinate pelvis_tilt: default_value=0 range=(-1.570796 1.570796) clamped=false
      Coordinate pelvis_tx: default_value=0 range=(-5 5) clamped=false
      Coordinate pelvis_ty: default_value=0 range=(-3 3) clamped=false
      Coordinate pelvis_tz: default_value=0 range=(-3 3) clamped=false
      PhysicalOffsetFrame ground_offset: socket_parent=/ground translation=(0 0 0) [meters]
      PhysicalOffsetFrame pelvis_offset: socket_parent=/bodyset/pelvis translation=(0 0 0)
      SpatialTransform:
        TransformAxis rotation1: coordinates=pelvis_rotation axis=(0 1 0) LinearFunction(coefficients=1 0)
        TransformAxis rotation2: coordinates=pelvis_list axis=(1 0 0) LinearFunction(coefficients=1 0)
        TransformAxis rotation3: coordinates=pelvis_tilt axis=(0 0 1) LinearFunction(coefficients=1 0)
        TransformAxis translation1: coordinates=pelvis_tx axis=(1 0 0) LinearFunction(coefficients=1 0)
        TransformAxis translation2: coordinates=pelvis_ty axis=(0 1 0) LinearFunction(coefficients=1 0)
        TransformAxis translation3: coordinates=pelvis_tz axis=(0 0 1) LinearFunction(coefficients=1 0)
    CustomJoint hip_r: socket_parent_frame=pelvis_offset socket_child_frame=femur_r_offset
      Coordinate hip_flexion_r: default_value=0 range=(-2.094395 2.094395) clamped=false
      Coordinate hip_adduction_r: default_value=0 range=(-2.094395 2.094395) clamped=false
      Coordinate hip_rotation_r: default_value=0 range=(-2.094395 2.094395) clamped=false
      PhysicalOffsetFrame pelvis_offset: socket_parent=/bodyset/pelvis translation=(-0.06776066 -0.05712413 0.08217538)
      PhysicalOffsetFrame femur_r_offset: socket_parent=/bodyset/femur_r translation=(0 0 0)
      SpatialTransform: axes_held_at_zero=(translation1 translation2 translation3)
        TransformAxis rotation1: coordinates=hip_flexion_r axis=(0 0 1) LinearFunction(coefficients=1 0)
        TransformAxis rotation2: coordinates=hip_adduction_r axis=(1 0 0) LinearFunction(coefficients=1 0)
        TransformAxis rotation3: coordinates=hip_rotation_r axis=(0 1 0) LinearFunction(coefficients=1 0)
    CustomJoint knee_r: socket_parent_frame=femur_r_offset socket_child_frame=tibia_r_offset
      Coordinate knee_flexion_r: default_value=0 range=(-2.094395 0.1745329) clamped=false
      Coordinate knee_adduction_r: default_value=0 range=(-0.5235988 0.5235988) clamped=false
      Coordinate knee_rotation_r: default_value=0 range=(-0.5235988 0.5235988) clamped=false
      PhysicalOffsetFrame femur_r_offset: socket_parent=/bodyset/femur_r translation=(0 -0.395 0)
      PhysicalOffsetFrame tibia_r_offset: socket_parent=/bodyset/tibia_r translation=(0 0 0)
      SpatialTransform: axes_held_at_zero=(translation1 translation2 translation3)
        TransformAxis rotation1: coordinates=knee_flexion_r axis=(0 0 1) LinearFunction(coefficients=1 0)
        TransformAxis rotation2: coordinates=knee_adduction_r axis=(1 0 0) LinearFunction(coefficients=1 0)
        TransformAxis rotation3: coordinates=knee_rotation_r axis=(0 1 0) LinearFunction(coefficients=1 0)
    CustomJoint ankle_r: socket_parent_frame=tibia_r_offset socket_child_frame=talus_r_offset
      Coordinate ankle_flexion_r: default_value=0 range=(-0.6981317 0.5235988) clamped=false
      Coordinate ankle_adduction_r: default_value=0 range=(-0.5235988 0.5235988) clamped=false
      Coordinate ankle_rotation_r: default_value=0 range=(-0.6981317 0.6981317) clamped=false
      PhysicalOffsetFrame tibia_r_offset: socket_parent=/bodyset/tibia_r translation=(0 -0.43 0)
      PhysicalOffsetFrame talus_r_offset: socket_parent=/bodyset/talus_r translation=(0 0 0)
      SpatialTransform: axes_held_at_zero=(translation1 translation2 translation3)
        TransformAxis rotation1: coordinates=ankle_flexion_r axis=(0 0 1) LinearFunction(coefficients=1 0)
        TransformAxis rotation2: coordinates=ankle_adduction_r axis=(0 1 0) LinearFunction(coefficients=1 0)
        TransformAxis rotation3: coordinates=ankle_rotation_r axis=(1 0 0) LinearFunction(coefficients=1 0)
    CustomJoint subtalar_r: socket_parent_frame=talus_r_offset socket_child_frame=calcn_r_offset
      Coordinate subtalar_angle_r: default_value=0 range=(-1.570796 1.570796) clamped=false locked=true
      PhysicalOffsetFrame talus_r_offset: socket_parent=/bodyset/talus_r translation=(0 0 0)
      PhysicalOffsetFrame calcn_r_offset: socket_parent=/bodyset/calcn_r translation=(0 0 0)
      SpatialTransform: axes_held_at_zero=(rotation2 rotation3 translation1 translation2 translation3)
        TransformAxis rotation1: coordinates=subtalar_angle_r axis=(0.7871796 0.6047475 -0.1209495)
            LinearFunction(coefficients=1 0)
    CustomJoint mtp_r: socket_parent_frame=calcn_r_offset socket_child_frame=toes_r_offset
      Coordinate forefoot_flexion_r: default_value=0 range=(-0.6981317 0.5235988) clamped=false
      Coordinate forefoot_adduction_r: default_value=0 range=(-0.6981317 0.6981317) clamped=false
      Coordinate forefoot_rotation_r: default_value=0 range=(-0.6981317 0.6981317) clamped=false
      PhysicalOffsetFrame calcn_r_offset: socket_parent=/bodyset/calcn_r translation=(0.0817053 0.00652635 0.00423662)
      PhysicalOffsetFrame toes_r_offset: socket_parent=/bodyset/toes_r translation=(-0.05 0.05 0.01)
      SpatialTransform: axes_held_at_zero=(translation1 translation2 translation3)
        TransformAxis rotation1: coordinates=forefoot_flexion_r axis=(0 0 1) LinearFunction(coefficients=1 0)
        TransformAxis rotation2: coordinates=forefoot_adduction_r axis=(0 1 0) LinearFunction(coefficients=1 0)
        TransformAxis rotation3: coordinates=forefoot_rotation_r axis=(1 0 0) LinearFunction(coefficients=1 0)
    CustomJoint hip_l: socket_parent_frame=pelvis_offset socket_child_frame=femur_l_offset
      Coordinate hip_flexion_l: default_value=0 range=(-2.094395 2.094395) clamped=false
      Coordinate hip_adduction_l: default_value=0 range=(-2.094395 2.094395) clamped=false
      Coordinate hip_rotation_l: default_value=0 range=(-2.094395 2.094395) clamped=false
      PhysicalOffsetFrame pelvis_offset: socket_parent=/bodyset/pelvis
          translation=(-0.06776066 -0.05712413 -0.08217538)
      PhysicalOffsetFrame femur_l_offset: socket_parent=/bodyset/femur_l translation=(0 0 0)
      SpatialTransform: axes_held_at_zero=(translation1 translation2 translation3)
        TransformAxis rotation1: coordinates=hip_flexion_l axis=(0 0 1) LinearFunction(coefficients=1 0)
        TransformAxis rotation2: coordinates=hip_adduction_l axis=(-1 0 0) LinearFunction(coefficients=1 0)
        TransformAxis rotation3: coordinates=hip_rotation_l axis=(0 -1 0) LinearFunction(coefficients=1 0)
    CustomJoint knee_l: socket_parent_frame=femur_l_offset socket_child_frame=tibia_l_offset
      Coordinate knee_flexion_l: default_value=0 range=(-2.094395 0.1745329) clamped=false
      Coordinate knee_adduction_l: default_value=0 range=(-0.5235988 0.5235988) clamped=false
      Coordinate knee_rotation_l: default_value=0 range=(-0.5235988 0.5235988) clamped=false
      PhysicalOffsetFrame femur_l_offset: socket_parent=/bodyset/femur_l translation=(0 -0.395 0)
      PhysicalOffsetFrame tibia_l_offset: socket_parent=/bodyset/tibia_l translation=(0 0 0)
      SpatialTransform: axes_held_at_zero=(translation1 translation2 translation3)
        TransformAxis rotation1: coordinates=knee_flexion_l axis=(0 0 1) LinearFunction(coefficients=1 0)
        TransformAxis rotation2: coordinates=knee_adduction_l axis=(-1 0 0) LinearFunction(coefficients=1 0)
        TransformAxis rotation3: coordinates=knee_rotation_l axis=(0 -1 0) LinearFunction(coefficients=1 0)
    CustomJoint ankle_l: socket_parent_frame=tibia_l_offset socket_child_frame=talus_l_offset
      Coordinate ankle_flexion_l: default_value=0 range=(-0.6981317 0.5235988) clamped=false
      Coordinate ankle_adduction_l: default_value=0 range=(-0.5235988 0.5235988) clamped=false
      Coordinate ankle_rotation_l: default_value=0 range=(-0.6981317 0.6981317) clamped=false
      PhysicalOffsetFrame tibia_l_offset: socket_parent=/bodyset/tibia_l translation=(0 -0.43 0)
      PhysicalOffsetFrame talus_l_offset: socket_parent=/bodyset/talus_l translation=(0 0 0)
      SpatialTransform: axes_held_at_zero=(translation1 translation2 translation3)
        TransformAxis rotation1: coordinates=ankle_flexion_l axis=(0 0 1) LinearFunction(coefficients=1 0)
        TransformAxis rotation2: coordinates=ankle_adduction_l axis=(0 -1 0) LinearFunction(coefficients=1 0)
        TransformAxis rotation3: coordinates=ankle_rotation_l axis=(-1 0 0) LinearFunction(coefficients=1 0)
    CustomJoint subtalar_l: socket_parent_frame=talus_l_offset socket_child_frame=calcn_l_offset
      Coordinate subtalar_angle_l: default_value=0 range=(-1.570796 1.570796) clamped=false locked=true
      PhysicalOffsetFrame talus_l_offset: socket_parent=/bodyset/talus_l translation=(0 0 0)
      PhysicalOffsetFrame calcn_l_offset: socket_parent=/bodyset/calcn_l translation=(0 0 0)
      SpatialTransform: axes_held_at_zero=(rotation2 rotation3 translation1 translation2 translation3)
        TransformAxis rotation1: coordinates=subtalar_angle_l axis=(-0.7871796 -0.6047475 -0.1209495)
            LinearFunction(coefficients=1 0)
    CustomJoint mtp_l: socket_parent_frame=calcn_l_offset socket_child_frame=toes_l_offset
      Coordinate forefoot_flexion_l: default_value=0 range=(-0.6981317 0.5235988) clamped=false
      Coordinate forefoot_adduction_l: default_value=0 range=(-0.6981317 0.6981317) clamped=false
      Coordinate forefoot_rotation_l: default_value=0 range=(-0.6981317 0.6981317) clamped=false
      PhysicalOffsetFrame calcn_l_offset: socket_parent=/bodyset/calcn_l translation=(0.0817053 0.00652635 0.00423662)
      PhysicalOffsetFrame toes_l_offset: socket_parent=/bodyset/toes_l translation=(-0.05 0.05 0.01)
      SpatialTransform: axes_held_at_zero=(translation1 translation2 translation3)
        TransformAxis rotation1: coordinates=forefoot_flexion_l axis=(0 0 1) LinearFunction(coefficients=1 0)
        TransformAxis rotation2: coordinates=forefoot_adduction_l axis=(0 -1 0) LinearFunction(coefficients=1 0)
        TransformAxis rotation3: coordinates=forefoot_rotation_l axis=(-1 0 0) LinearFunction(coefficients=1 0)
  MarkerSet:
    Marker midASIS: pelvis (0 0 0)
    Marker LASI: pelvis (0.007753468 0.008786054 -0.1226696)
    Marker RASI: pelvis (-0.005723265 0.003106075 0.1252874)
    Marker LPSI: pelvis (-0.1759745 0.05484443 -0.0669379)
    Marker RPSI: pelvis (-0.1733877 0.05481989 0.05376593)
    Marker SACR: pelvis (-0.1759745 0.05481989 0)
    Marker LHJC: pelvis (-0.06776066 -0.05712413 -0.08217538)
    Marker RHJC: pelvis (-0.06776066 -0.05712413 0.08217538)
    Marker midHJC: pelvis (-0.06776066 -0.05712413 0)
    Marker pelvisCentre: pelvis (-0.08798726 0.02740994 0)
    Marker LTHI: femur_l (-0.00399242 -0.20754 -0.0999247)
    Marker LKNE: femur_l (0 -0.415174 -0.0525)
    Marker LKJC: femur_l (0 -0.395 0)
    Marker LKNM: femur_l (0 -0.415174 0.0525)
    Marker RTHI: femur_r (0.002865 -0.233089 0.128454)
    Marker RKNE: femur_r (3.72529e-9 -0.402651 0.0527368)
    Marker RKJC: femur_r (0 -0.395 0)
    Marker RKNM: femur_r (0 -0.402651 -0.0527368)
    Marker LTIB: tibia_l (-0.0208461 -0.192153 -0.10025)
    Marker LANK: tibia_l (0 -0.424826 -0.04)
    Marker LAJC: tibia_l (0 -0.43 0)
    Marker LMED: tibia_l (-0.00969172 -0.424826 0.04)
    Marker RTIB: tibia_r (-1.77636e-17 -0.206151 0.0710892)
    Marker RANK: tibia_r (-0.00969172 -0.418783 0.0429379)
    Marker RAJC: tibia_r (0 -0.43 0)
    Marker RMED: tibia_r (-0.00969172 -0.418783 -0.0429379)
    Marker RHEE: calcn_r (-0.0645362 -0.0271254 -0.0145158)
    Marker RTOE: calcn_r (0.0817053 0.00652635 0.00423662)
    Marker LHEE: calcn_l (-0.0645362 -0.0271254 -0.0145158)
    Marker LTOE: calcn_l (0.0817053 0.00652635 0.00423662)
    Marker LTHAP: femur_l (0.0510168 -0.135932 -0.0206733)
    Marker LTHAD: femur_l (0.0575402 -0.282133 -0.012113)
    Marker LTIAP: tibia_l (0.0468274 -0.161181 -0.0112459)
    Marker LTIAD: tibia_l (0.0356325 -0.307753 0.0153233)
    Marker RTHAP: femur_r (0.0510168 -0.135932 -0.0206733)
    Marker RTHAD: femur_r (0.0575402 -0.282133 -0.012113)
    Marker RTIAP: tibia_r (0.0468274 -0.161181 -0.0112459)
    Marker RTIAD: tibia_r (0.0626192 -0.302782 0.0125915)
    Marker LTHLD: femur_l (0.012637 -0.287289 -0.0550111)
    Marker LPAT: femur_l (0.0499838 -0.392918 0.000312091)
    Marker RTHLD: femur_r (0.0190351 -0.287393 0.0469096)
    Marker RPAT: femur_r (0.0422081 -0.39479 0.00836546)
