# OpenSim document version 40000
ScaleTool cgm2-Osim-scaled:
  mass: 40.928 [kg]
  height: -1
  age: -1
  GenericModelMaker:
    marker_set_file: cgm2_3-markerset.xml
  ModelScaler:
    apply: true
    scaling_order: measurements
    marker_file: staticVerif.trc
    time_range: 0 0.08
    preserve_mass_distribution: true
    MeasurementSet:
      Measurement pelvis-AntPos: apply=true
        MarkerPair: markers=(SACR midASIS)
        BodyScale pelvis: axes=X
      Measurement pelvis-ProDis: apply=true
        MarkerPair: markers=(midHJC pelvisCentre)
        BodyScale pelvis: axes=Y
      Measurement pelvis-MedLat: apply=true
        MarkerPair: markers=(LHJC RHJC)
        BodyScale pelvis: axes=Z
      Measurement leftFemur-AntPos: apply=true
        MarkerPair: markers=(LKNE LKNM)
        BodyScale femur_l: axes=X
      Measurement leftFemur-ProDis: apply=true
        MarkerPair: markers=(LHJC LKJC)
        BodyScale femur_l: axes=Y
      Measurement leftFemur-MedLat: apply=true
        MarkerPair: markers=(LKNE LKNM)
        BodyScale femur_l: axes=Z
      Measurement leftTibia-AntPos: apply=true
        MarkerPair: markers=(LANK LMED)
        BodyScale tibia_l: axes=X
        BodyScale talus_l: axes=X
      Measurement leftTibia-ProDis: apply=true
        MarkerPair: markers=(LKJC LAJC)
        BodyScale tibia_l: axes=Y
        BodyScale talus_l: axes=Y
      Measurement leftTibia-MedLat: apply=true
        MarkerPair: markers=(LANK LMED)
        BodyScale tibia_l: axes=Z
        BodyScale talus_l: axes=Z
      Measurement leftFoot-AntPos: apply=true
        MarkerPair: markers=(LHEE LTOE)
        BodyScale calcn_l: axes=X
        BodyScale toes_l: axes=X
      Measurement leftFoot-ProDis: apply=true
        MarkerPair: markers=(LHEE LTOE)
        BodyScale calcn_l: axes=Y
        BodyScale toes_l: axes=Y
      Measurement leftFoot-MedLat: apply=true
        MarkerPair: markers=(LHEE LTOE)
        BodyScale calcn_l: axes=Z
        BodyScale toes_l: axes=Z
      Measurement rightFemur-AntPos: apply=true
        MarkerPair: markers=(RKNE RKNM)
        BodyScale femur_r: axes=X
      Measurement rightFemur-ProDis: apply=true
        MarkerPair: markers=(RHJC RKJC)
        BodyScale femur_r: axes=Y
      Measurement rightFemur-MedLat: apply=true
        MarkerPair: markers=(RKNE RKNM)
        BodyScale femur_r: axes=Z
      Measurement rightTibia-AntPos: apply=true
        MarkerPair: markers=(RANK RMED)
        BodyScale tibia_r: axes=X
        BodyScale talus_r: axes=X
      Measurement rightTibia-ProDis: apply=true
        MarkerPair: markers=(RKJC RAJC)
        BodyScale tibia_r: axes=Y
        BodyScale talus_r: axes=Y
      Measurement rightTibia-MedLat: apply=true
        MarkerPair: markers=(RANK RMED)
        BodyScale tibia_r: axes=Z
        BodyScale talus_r: axes=Z
      Measurement rightFoot-AntPos: apply=true
        MarkerPair: markers=(RHEE RTOE)
        BodyScale calcn_r: axes=X
        BodyScale toes_r: axes=X
      Measurement rightFoot-ProDis: apply=true
        MarkerPair: markers=(RHEE RTOE)
        BodyScale calcn_r: axes=Y
        BodyScale toes_r: axes=Y
      Measurement rightFoot-MedLat: apply=true
        MarkerPair: markers=(RHEE RTOE)
        BodyScale calcn_r: axes=Z
        BodyScale toes_r: axes=Z
  MarkerPlacer:
    apply: true
    marker_file: staticVerif.trc
    time_range: 0 0.08
    output_model_file: __ScaledModel.osim
    max_marker_movement: -1
    IKTaskSet:
      IKMarkerTask midASIS: apply=true weight=0
      IKMarkerTask LASI: apply=true weight=10
      IKMarkerTask RASI: apply=true weight=10
      IKMarkerTask LPSI: apply=true weight=10
      IKMarkerTask RPSI: apply=true weight=10
      IKMarkerTask SACR: apply=true weight=0
      IKMarkerTask LHJC: apply=true weight=100
      IKMarkerTask RHJC: apply=true weight=100
      IKMarkerTask midHJC: apply=true weight=0
      IKMarkerTask pelvisCentre: apply=true weight=0
      IKMarkerTask LTHI: apply=true weight=0
      IKMarkerTask LKNE: apply=true weight=10
      IKMarkerTask LKJC: apply=true weight=100
      IKMarkerTask LKNM: apply=true weight=10
      IKMarkerTask RTHI: apply=true weight=0
      IKMarkerTask RKNE: apply=true weight=10
      IKMarkerTask RKJC: apply=true weight=100
      IKMarkerTask RKNM: apply=true weight=10
      IKMarkerTask LTIB: apply=true weight=0
      IKMarkerTask LANK: apply=true weight=10
      IKMarkerTask LAJC: apply=true weight=100
      IKMarkerTask LMED: apply=true weight=10
      IKMarkerTask RTIB: apply=true weight=0
      IKMarkerTask RANK: apply=true weight=10
      IKMarkerTask RAJC: apply=true weight=100
      IKMarkerTask RMED: apply=true weight=10
      IKMarkerTask RHEE: apply=true weight=10
      IKMarkerTask RTOE: apply=true weight=10
      IKMarkerTask LHEE: apply=true weight=10
      IKMarkerTask LTOE: apply=true weight=10
      IKMarkerTask LTHAP: apply=true weight=0
      IKMarkerTask LTHAD: apply=true weight=0
      IKMarkerTask LTIAP: apply=true weight=0
      IKMarkerTask LTIAD: apply=true weight=0
      IKMarkerTask RTHAP: apply=true weight=0
      IKMarkerTask RTHAD: apply=true weight=0
      IKMarkerTask RTIAP: apply=true weight=0
      IKMarkerTask RTIAD: apply=true weight=0
      IKMarkerTask LTHLD: apply=true weight=0
      IKMarkerTask LPAT: apply=false weight=0
      IKMarkerTask RTHLD: apply=true weight=0
      IKMarkerTask RPAT: apply=false weight=0
